<FDM_CONFIG NAME="Fokker 100" VERSION="1.65" RELEASE="ALPHA">
<!--
  File:     Fokker 100.xml
  Author:   Aero-Matic v 0.71

  Sources:
     *  Butterworth-Heinemann - Civil Jet Aircraft Design (BH)
        http://www.bh.com/companions/034074152X/appendices/data-a/default.htm
     *  Lissys - PIANO aircraft analysis software
        http://www.lissys.demon.co.uk/f7tx2.html
     *  Advanced Topics in Aerodynamics, Aerodynamic Database (AD)
        http://aerodyn.org/HighLift/tables.html

  Inputs:
    name:          Fokker 100
    type:          two-engine transonic transport
    max weight:    95013.45 lb
    wing span:     92.13048 ft
    length:        115.32715 ft
    wing area:     1006.5275 sq-ft
    gear type:     tricycle
    retractable?:  yes
    # engines:     2
    engine type:   turbine
    engine layout: middle fuselage
    yaw damper?    yes

  Outputs:
    wing loading:  94.40 lb/sq-ft
    CL-alpha:      4.4 per radian
    CL-0:          0.2
    CL-max:        3.45 (in ground effect)
    CD-0:          0.02
    K:             0.043

-->

 <METRICS>
   AC_WINGAREA  1006.53
   AC_WINGSPAN  92.13
   AC_CHORD     12.41			<!-- Lissys -->
   AC_HTAILAREA 244.47			<!-- Lissys -->
   AC_HTAILARM  47.22			<!-- Lissys -->
   AC_VTAILAREA 178.83			<!-- Lissys -->
   AC_LV        37.62			<!-- Lissys -->
   AC_IXX       587012
   AC_IYY       2125156
   AC_IZZ       2519272
   AC_IXZ       0
   AC_EMPTYWT   54218			<!-- BH -->
   AC_CGLOC     627.4  0.0 -16.5
   AC_AERORP    627.4  0.0 18.1
   AC_EYEPTLOC  94.5 -22.4 49.2
   AC_VRP       0 0 0

   <!-- pilot -->
   AC_POINTMASS  230.0 94.5  -22.4 25.6
   <!-- co-pilot -->
   AC_POINTMASS  230.0 94.5 22.4 25.6
   <!-- 2 stuward(esse)s -->
   AC_POINTMASS  400.0 206.0 22.4 25.6
 </METRICS>
 <UNDERCARRIAGE>
  AC_GEAR NOSE_LG   137.0  0.0 -81.5 28504.0 9501.3  0.5  0.8  0.02 STEERABLE NONE  5.0 RETRACT
  AC_GEAR LEFT_MLG  700.4 -113.0 -89.8 95013.4 19002.7  0.5  0.8  0.02 FIXED LEFT  0 RETRACT
  AC_GEAR RIGHT_MLG 700.4 113.0 -89.8 95013.4 19002.7  0.5  0.8  0.02 FIXED RIGHT 0 RETRACT
 </UNDERCARRIAGE>
 <PROPULSION>
  <AC_ENGINE FILE="Tay-651">
    XLOC 1028.74
    YLOC -101.6
    ZLOC -49.2
    PITCH 0
    YAW 0
    FEED 0
    <AC_THRUSTER FILE="direct">
      XLOC 1028.74
      YLOC -101.6
      ZLOC -49.2
      PITCH 0
      YAW 0
    </AC_THRUSTER>
  </AC_ENGINE>
  <AC_ENGINE FILE="Tay-651">
    XLOC 1028.74
    YLOC 101.6
    ZLOC -49.2
    PITCH 0
    YAW 0
    FEED 1
    <AC_THRUSTER FILE="direct">
      XLOC 1028.74
      YLOC 101.6
      ZLOC -49.2
      PITCH 0
      YAW 0
    </AC_THRUSTER>
  </AC_ENGINE>
  <AC_TANK TYPE="FUEL" NUMBER="0">
    XLOC 587.4
    YLOC 0
    ZLOC -16.5
    RADIUS 1
    CAPACITY  1377.0
    CONTENTS   688.5
  </AC_TANK>
  <AC_TANK TYPE="FUEL" NUMBER="1">
    XLOC 587.4
    YLOC 0
    ZLOC -16.5
    RADIUS 1
    CAPACITY  1377.0
    CONTENTS   688.5
  </AC_TANK>
  <AC_TANK TYPE="FUEL" NUMBER="2">
    XLOC 587.4
    YLOC 0
    ZLOC -16.5
    RADIUS 1
    CAPACITY  1377.0
    CONTENTS   688.5
  </AC_TANK>
 </PROPULSION>
 <FLIGHT_CONTROL NAME="Fokker 100">
   <COMPONENT NAME="Pitch Trim Sum" TYPE="SUMMER">
      INPUT   fcs/elevator-cmd-norm
      INPUT   fcs/pitch-trim-cmd-norm
      CLIPTO  -1 1
   </COMPONENT>
   <COMPONENT NAME="Elevator Control" TYPE="AEROSURFACE_SCALE">
      INPUT   fcs/pitch-trim-sum
      MIN     -0.350
      MAX      0.300
      OUTPUT  fcs/elevator-pos-rad
   </COMPONENT>
   <COMPONENT NAME="Roll Trim Sum" TYPE="SUMMER">
      INPUT   fcs/aileron-cmd-norm
      INPUT   fcs/roll-trim-cmd-norm
      CLIPTO  -1 1
   </COMPONENT>
   <COMPONENT NAME="Left Aileron Control" TYPE="AEROSURFACE_SCALE">
      INPUT   fcs/roll-trim-sum
      MIN    -0.35
      MAX     0.35
      OUTPUT  fcs/left-aileron-pos-rad
   </COMPONENT>
   <COMPONENT NAME="Right Aileron Control" TYPE="AEROSURFACE_SCALE">
      INPUT  -fcs/roll-trim-sum
      MIN    -0.35
      MAX     0.35
      OUTPUT  fcs/right-aileron-pos-rad
   </COMPONENT>
   <COMPONENT NAME="Rudder Command Sum" TYPE="SUMMER">
      INPUT   fcs/rudder-cmd-norm
      INPUT   fcs/yaw-trim-cmd-norm
      CLIPTO  -1 1
   </COMPONENT>
   <COMPONENT NAME="Yaw Damper Rate" TYPE="SCHEDULED_GAIN">
      INPUT        velocities/r-aero-rad_sec
      SCHEDULED_BY aero/qbar-psf
      ROWS         2
       3.00        0.00
      11.00        2.00
   </COMPONENT>
   <COMPONENT NAME="Yaw Damper Beta" TYPE="SCHEDULED_GAIN">
      INPUT        aero/beta-rad
      SCHEDULED_BY aero/qbar-psf
      ROWS         2
       3.00        0.00
      11.00        0.00
   </COMPONENT>
   <COMPONENT NAME="Yaw Damper Sum" TYPE="SUMMER">
      INPUT        fcs/yaw-damper-beta
      INPUT        fcs/yaw-damper-rate
      CLIPTO      -0.2 0.2
   </COMPONENT>
   <COMPONENT NAME="Yaw Damper Final" TYPE="SCHEDULED_GAIN">
      INPUT        fcs/yaw-damper-sum
      SCHEDULED_BY aero/qbar-psf
      ROWS         2
      2.99         0.0
      3.00         1.0
   </COMPONENT>
   <COMPONENT NAME="Rudder Sum" TYPE="SUMMER">
      INPUT   fcs/rudder-command-sum
      INPUT   fcs/yaw-damper-final
      CLIPTO  -1 1
   </COMPONENT>
   <COMPONENT NAME="Rudder Control" TYPE="AEROSURFACE_SCALE">
      INPUT   fcs/rudder-sum
      MIN     -0.35
      MAX      0.35
      OUTPUT  fcs/rudder-pos-rad
   </COMPONENT>
   <COMPONENT NAME="Flaps Control" TYPE="KINEMAT">
     INPUT   fcs/flap-cmd-norm
     DETENTS 5
             0   0
             8   3
             15  3
             25  4
             42  4
     OUTPUT  fcs/flap-pos-deg
   </COMPONENT>
   <COMPONENT NAME="Gear Control" TYPE="KINEMAT">
     INPUT   gear/gear-cmd-norm
     DETENTS 2
             0   0
             1   5
     OUTPUT  gear/gear-pos-norm
   </COMPONENT>
   <COMPONENT NAME="Speedbrake Control" TYPE="KINEMAT">
     INPUT   fcs/speedbrake-cmd-norm
     DETENTS 2
             0   0
             1   1
     OUTPUT  fcs/speedbrake-pos-norm
   </COMPONENT>
   <COMPONENT NAME="Spoiler Control" TYPE="KINEMAT">
     INPUT   fcs/spoiler-cmd-norm
     DETENTS 2
             0   0
             1   1
     OUTPUT  fcs/spoiler-pos-norm
   </COMPONENT>
   <COMPONENT NAME="Spoiler Control" TYPE="KINEMAT">
     INPUT   fcs/spoiler-cmd-norm
     DETENTS 2
             0   0
             1   1
     OUTPUT  fcs/reverser-pos-norm
   </COMPONENT>
 </FLIGHT_CONTROL>
 <AERODYNAMICS>
  <AXIS NAME="LIFT">

    <GROUP NAME="CLb">
      Basic_lift
      <!-- Peden, AD -->
      <FACTOR NAME="kCLge" TYPE="VECTOR">
        Change_in_lift_due_to_ground_effect
        13
        aero/h_b-mac-ft
        none
        0.0   1.391
        0.1   1.235
        0.15  1.167
        0.2   1.135
        0.3   1.085
        0.4   1.102
        0.5   1.035
        0.6   1.024
        0.7   1.015
        0.8   1.011
        0.9   1.006
        1.0   1.004
        1.1   1.0
      </FACTOR>
      <!-- aeromatic, Linssys, AD -->
      <COEFFICIENT NAME="CLalpha" TYPE="VECTOR">
        Lift_due_to_alpha
        4
        aero/alpha-rad
        aero/qbar-psf|metrics/Sw-sqft
        -0.20   -0.68
         0.00    0.20
         0.23    1.30
         0.60    0.60
      </COEFFICIENT>
      <!-- AD, Linssys, BH -->
      <COEFFICIENT NAME="dCLflap" TYPE="VECTOR">
         Delta_Lift_due_to_flaps
         3
         fcs/components/flaps-control/output-norm
         aero/qbar-psf|metrics/Sw-sqft
         0.000   0.00
         0.357   0.49
         1.000   1.18
      </COEFFICIENT>
      <COEFFICIENT NAME="dCLsp" TYPE="VALUE">
         Delta_Lift_due_to_spoiler
         aero/qbar-psf|metrics/Sw-sqft|fcs/spoiler-pos-norm
         -0.12
      </COEFFICIENT>
    </GROUP>
    <COEFFICIENT NAME="CLde" TYPE="VALUE">
       Lift_due_to_Elevator_Deflection
       aero/qbar-psf|metrics/Sw-sqft|fcs/elevator-pos-rad
       0.2
    </COEFFICIENT>
  </AXIS>
  <!-- aeromatic, Linssys -->
  <AXIS NAME="DRAG">
    <GROUP NAME="CDb">
      Basic_drag
      <FACTOR NAME="kCDge" TYPE="VECTOR">
        Change_in_drag_due_to_ground_effect
        13
        aero/h_b-mac-ft
        none
        0.0   0.035
        0.1   0.417
        0.15  0.539
        0.2   0.624
        0.3   0.751
        0.4   0.800
        0.5   0.896
        0.6   0.939
        0.7   0.974
        0.8   0.981
        0.9   0.990
        1.0   0.994
        1.1   1.0
      </FACTOR>
      <COEFFICIENT NAME="CD0" TYPE="VECTOR">
         Drag_at_zero_lift
         5
         aero/alpha-rad
         aero/qbar-psf|metrics/Sw-sqft
         -1.57       1.500
         -0.26       0.040
          0.00       0.01922
          0.26       0.040
          1.57       1.500
      </COEFFICIENT>
      <!-- Linssys -->
      <COEFFICIENT NAME="CDi" TYPE="VALUE">
         Induced_drag
         aero/qbar-psf|metrics/Sw-sqft|aero/cl-squared-norm
         0.04478
      </COEFFICIENT>
      <COEFFICIENT NAME="CDflap" TYPE="VALUE">
         Drag_due_to_flaps
         aero/qbar-psf|metrics/Sw-sqft|fcs/components/flaps-control/output-norm
         0.083
      </COEFFICIENT>
    </GROUP>
    <!-- Linssys,
         based on the DC-9, but stretched to match the 0.88M design limit -->
    <COEFFICIENT NAME="CDmach" TYPE="VECTOR">
       Drag_due_to_mach
       6
       velocities/mach-norm
       aero/qbar-psf|metrics/Sw-sqft
       0.0       0.000
       0.65      0.000
       0.77      0.0015
       0.86      0.020
       1.1       0.039
       1.8       0.026
    </COEFFICIENT>
    <COEFFICIENT NAME="CDgear" TYPE="VALUE">
       Drag_due_to_gear
       aero/qbar-psf|metrics/Sw-sqft|gear/gear-pos-norm
       0.012
    </COEFFICIENT>
    <COEFFICIENT NAME="CDsb" TYPE="VALUE">
       Drag_due_to_speedbrakes
       aero/qbar-psf|metrics/Sw-sqft|fcs/speedbrake-pos-norm
       0.12
    </COEFFICIENT>
    <COEFFICIENT NAME="CDsp" TYPE="VALUE">
       Drag_due_to_spoilers
       aero/qbar-psf|metrics/Sw-sqft|fcs/spoiler-pos-norm
       0.028
    </COEFFICIENT>
    <COEFFICIENT NAME="CDbeta" TYPE="VECTOR">
       Drag_due_to_sideslip
       5
       aero/beta-rad
       aero/qbar-psf|metrics/Sw-sqft
       -1.57       1.230
       -0.26       0.050
        0.00       0.00
        0.26       0.050
        1.57       1.230
    </COEFFICIENT>
    <COEFFICIENT NAME="CDde" TYPE="VALUE">
       Drag_due_to_Elevator_Deflection
       aero/qbar-psf|metrics/Sw-sqft|fcs/elevator-pos-norm
       0.059
    </COEFFICIENT>
  </AXIS>
  <AXIS NAME="SIDE">
    <COEFFICIENT NAME="CYb" TYPE="VALUE">
       Side_force_due_to_beta
       aero/qbar-psf|metrics/Sw-sqft|aero/beta-rad
       -1
    </COEFFICIENT>
  </AXIS>
  <AXIS NAME="ROLL">
    <COEFFICIENT NAME="Clb" TYPE="VALUE">
       Roll_moment_due_to_beta
       aero/qbar-psf|metrics/Sw-sqft|metrics/bw-ft|aero/beta-rad
       -0.1
    </COEFFICIENT>
    <COEFFICIENT NAME="Clp" TYPE="VALUE">
       Roll_moment_due_to_roll_rate
       aero/qbar-psf|metrics/Sw-sqft|metrics/bw-ft|aero/bi2vel|velocities/p-aero-rad_sec
       -0.4
    </COEFFICIENT>
    <COEFFICIENT NAME="Clr" TYPE="VALUE">
       Roll_moment_due_to_yaw_rate
       aero/qbar-psf|metrics/Sw-sqft|metrics/bw-ft|aero/bi2vel|velocities/r-aero-rad_sec
       0.15
    </COEFFICIENT>
    <COEFFICIENT NAME="Clda" TYPE="VECTOR">
       Roll_moment_due_to_aileron
       2
       velocities/mach-norm
       aero/qbar-psf|metrics/Sw-sqft|metrics/bw-ft|fcs/left-aileron-pos-rad
       0.0       0.1
       2.0       0.033
    </COEFFICIENT>
    <COEFFICIENT NAME="Cldr" TYPE="VALUE">
       Roll_moment_due_to_rudder
       aero/qbar-psf|metrics/Sw-sqft|metrics/bw-ft|fcs/rudder-pos-rad
       0.01
    </COEFFICIENT>
  </AXIS>
  <AXIS NAME="PITCH">
    <GROUP NAME="Cmb">
      Basic_pitching_moment
      <FACTOR NAME="kCmge" TYPE="VECTOR">
         Change_in_lift_due_to_ground_effect
         13
         aero/h_b-mac-ft
         none
         0.0   1.203
         0.1   1.127
         0.15  1.090
         0.2   1.073
         0.3   1.046
         0.4   1.055
         0.5   1.019
         0.6   1.013
         0.7   1.008
         0.8   1.006
         0.9   1.003
         1.0   1.002
         1.1   1.0
      </FACTOR>
<!--
      <FACTOR NAME="kCmpge" TYPE="VECTOR">
        Change_in_ground_effect_due_to_pitch
        3
        attitude/pitch-rad
        none
        -0.4   0.6
         0.0   1.0
         0.4   1.4
      </FACTOR>
-->
      <COEFFICIENT NAME="Cmo" TYPE="VALUE">
         Pitching_moment_at_zero_alpha
         aero/qbar-psf|metrics/Sw-sqft|metrics/cbarw-ft
         -0.042
      </COEFFICIENT>
    </GROUP>
    <COEFFICIENT NAME="Cmalpha" TYPE="VALUE">
       Pitch_moment_due_to_alpha
       aero/qbar-psf|metrics/Sw-sqft|metrics/cbarw-ft|aero/alpha-rad
       -0.6
    </COEFFICIENT>
    <COEFFICIENT NAME="Cmde" TYPE="VECTOR">
       Pitch_moment_due_to_elevator
       2
       velocities/mach-norm
       aero/qbar-psf|metrics/Sw-sqft|metrics/cbarw-ft|fcs/elevator-pos-rad
       0.0       -1.2
       2.0       -0.300
    </COEFFICIENT>
    <COEFFICIENT NAME="Cmq" TYPE="VALUE">
       Pitch_moment_due_to_pitch_rate
       aero/qbar-psf|metrics/Sw-sqft|metrics/cbarw-ft|aero/ci2vel|velocities/q-aero-rad_sec
       -17
    </COEFFICIENT>
    <COEFFICIENT NAME="Cmadot" TYPE="VALUE">
       Pitch_moment_due_to_alpha_rate
       aero/qbar-psf|metrics/Sw-sqft|metrics/cbarw-ft|aero/ci2vel|aero/alphadot-rad_sec
       -6
    </COEFFICIENT>
  </AXIS>
  <AXIS NAME="YAW">
    <COEFFICIENT NAME="Cnb" TYPE="VALUE">
       Yaw_moment_due_to_beta
       aero/qbar-psf|metrics/Sw-sqft|metrics/bw-ft|aero/beta-rad
       0.12
    </COEFFICIENT>
    <COEFFICIENT NAME="Cnr" TYPE="VALUE">
       Yaw_moment_due_to_yaw_rate
       aero/qbar-psf|metrics/Sw-sqft|metrics/bw-ft|aero/bi2vel|velocities/r-aero-rad_sec
       -0.15
    </COEFFICIENT>
    <COEFFICIENT NAME="Cndr" TYPE="VALUE">
       Yaw_moment_due_to_rudder
       aero/qbar-psf|metrics/Sw-sqft|metrics/bw-ft|fcs/rudder-pos-rad
       -0.1
    </COEFFICIENT>
    <COEFFICIENT NAME="Cnda" TYPE="VALUE">
       Adverse_yaw
       aero/qbar-psf|metrics/Sw-sqft|metrics/bw-ft|fcs/left-aileron-pos-rad
       0
    </COEFFICIENT>
  </AXIS>
 </AERODYNAMICS>
</FDM_CONFIG>
